Wed Jun 26 14:30:46 PDT 2013
$PROB RUN# 0069 ; 0028 but THETA 7, THETA 8, OM7, OM8 estimated.
$INPUT C STUD ID COHO SEX ROUT VISIT DOSE DV HALD INFDUR DAY TIME WGTB RACE HGTB AGE DIS MDV EVID AMT RATE ADDL II CMT
$DATA ../183_6209_620_390.csv IGNORE=C
	IGNORE=(ID.EQ.91)
  ; 1015=91 in Study 183 is a placebo

$SUBROUTINES ADVAN4 TRANS4

$PK
    BWAVG = 76.5   	; kg.  mean for the three studies,

   MU_1=LOG(THETA(1))
   TVCL=EXP(MU_1+ETA(1))	; L/day

   MU_7=LOG(THETA(7))
   SBWCL=EXP(MU_7+ETA(7))

   CL=TVCL*(WGTB/BWAVG)**SBWCL	; L/day

   MU_2=LOG(THETA(2))
   TVV2=EXP(MU_2+ETA(2))	; L

   MU_8=LOG(THETA(8))
   SBWV2=EXP(MU_8+ETA(8))

   V2=TVV2*(WGTB/BWAVG)**SBWV2	; L

   MU_3=LOG(THETA(3))
   Q=EXP(MU_3+ETA(3))	; L/day

   MU_4=LOG(THETA(4))
   V3=EXP(MU_4+ETA(4))	; L

   MU_5=LOG(THETA(5))
   KA=EXP(MU_5+ETA(5))	; 1/day

   MU_6=LOG(THETA(6)/(1-THETA(6)) )
   F1=1/(1+EXP(-(MU_6+ETA(6))) )  	; %

   ; calculate infusion rate for IV by infusion time and dose level
   IF( INFDUR.GT.0 ) R2=DOSE/INFDUR	 	; mg/day

   S2=V2/1000 ; mg/L -> ng/mL

   ; "derived"
   K=CL/V2
   K23=Q/V2
   K32=Q/V3

   ; beta-phase exponential decay
   BETA=(K-(((K**2+(2*((K23*(K+K32))-(K*K32)))+K23**2+K32**2)**0.5)*( 1))+K23+K32)*0.5

   ; terminal half-life
   THAL=LOG(2)/BETA	  ; day

$ERROR
 DEL=0
 IF (F.LE.0.0001) DEL=1
 IPRE=F
 W1= 1
 W2= F
 IRES= DV-IPRE
 IWRE=IRES/(W1+W2)
   Y = F + W1*ERR(1) + W2*ERR(2)

$THETA
  (0, 0.161) ;[CL, L/day]
  (0, 3.030) ;[V2, L]
  (0, 0.930) ;[Q, L/day]
  (0, 2.09) ;[V3, L]
  (0, 0.370) ;[KA, 1/day]
  (0, 0.664) ;[F, %]
  0.75 FIXED ; [CL~BW, -]
  1 FIXED ; [V2~BW, -]

$OMEGA BLOCK(2)
  0.830 ;[P] omega(1,1)
  0.0632 ;[F] omega(2,1)
  0.104 ;[P] omega(2,2)
$OMEGA
  0 FIXED ;[P] omega(3,3)
  0 FIXED ;[P] omega(4,4)
  0.194 ;[P] omega(5,5)
  0 FIXED ;[P] omega(6,6)
  0 FIXED  ;[P] omega(7,7)
  0 FIXED   ;[P] omega(8,8)

$SIGMA
  0 FIXED ;[A] sigma(1,1)
  0.0320 ;[P] sigma(2,2)

;$EST METH=ITS INTERACTION PRINT=5 NITER=20 SIG=3 NOABORT MSFO=./0060.MSF
$EST METH=1 INTERACTION PRINT=5 MAX=9999 SIG=3 NOABORT MSFO=./0069.MSF
$EST METH=IMP INTERACTION PRINT=1 NITER=200 EONLY=0 NOABORT SIGL=9 CTYPE=3 MSFO=./0069.MSF
$EST METH=IMP INTERACTION PRINT=1 NITER=10 ISAMPLE=2000 EONLY=1 NOABORT SIGL=9 MSFO=./0069.MSF

$COV UNCONDITIONAL NOFCOV PRINT=E

$TABLE ONEHEADER NOPRINT FILE=./0069.tab
  ID TIME EVID STUD COHO SEX ROUT VISIT DOSE DAY WGTB RACE AGE DIS HGTB IPRE IRES IWRE MDV
  CL V2 Q V3 KA R2 F1 THAL SBWCL SBWV2
  ETA1 ETA2 ETA3 ETA4 ETA5 ETA6 ETA7 ETA8
$TABLE ONEHEADER NOPRINT FIRSTONLY FILE=./0069par.tab
  ID EVID CL V2 Q V3 KA R2 F1 SBWCL SBWV2 THAL

NM-TRAN MESSAGES
 WARNINGS AND ERRORS (IF ANY) FOR PROBLEM    1
 (WARNING  2) NM-TRAN INFERS THAT THE DATA ARE POPULATION.
 (WARNING  97) A RANDOM QUANTITY IS RAISED TO A POWER. IF THE RESULT AFFECTS
 THE VALUE OF THE OBJECTIVE FUNCTION, THE USER SHOULD ENSURE THAT THE
 RANDOM QUANTITY IS NEVER 0 WHEN THE POWER IS < 1.
 (WARNING  99) A RANDOM QUANTITY IS USED AS A POWER. IF THE RESULT AFFECTS
 THE VALUE OF THE OBJECTIVE FUNCTION, THE USER SHOULD ENSURE THAT THE
 QUANTITY RAISED TO THE POWER IS NOT 0.

1NONLINEAR MIXED EFFECTS MODEL PROGRAM (NONMEM) VERSION 7.2.0
 ORIGINALLY DEVELOPED BY STUART BEAL, LEWIS SHEINER, AND ALISON BOECKMANN
 CURRENT DEVELOPERS ARE ROBERT BAUER, ICON DEVELOPMENT SOLUTIONS,
 AND ALISON BOECKMANN. IMPLEMENTATION, EFFICIENCY, AND STANDARDIZATION
 PERFORMED BY NOUS INFOSYSTEMS.
 PROBLEM NO.:         1
 RUN# 0069 ; 0028 but THETA 7, THETA 8, OM7, OM8 estimated.
 TOT. NO. OF OBS RECS:     1723
 TOT. NO. OF INDIVIDUALS:    110
 TWO COMPARTMENT MODEL WITH FIRST-ORDER ABSORPTION (ADVAN4)
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 #TBLN:      1
 #METH: First Order Conditional Estimation with Interaction
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
 #TERM:
0MINIMIZATION SUCCESSFUL
 NO. OF FUNCTION EVALUATIONS USED:      304
 NO. OF SIG. DIGITS IN FINAL EST.:  3.5

 ETABAR IS THE ARITHMETIC MEAN OF THE ETA-ESTIMATES,
 AND THE P-VALUE IS GIVEN FOR THE NULL HYPOTHESIS THAT THE TRUE MEAN IS 0.

 ETABAR:         1.3079E-03  8.0472E-04  0.0000E+00  0.0000E+00  8.8913E-04  0.0000E+00  0.0000E+00  0.0000E+00
 SE:             2.4320E-02  2.8937E-02  0.0000E+00  0.0000E+00  3.5341E-02  0.0000E+00  0.0000E+00  0.0000E+00

 P VAL.:         9.5711E-01  9.7781E-01  1.0000E+00  1.0000E+00  9.7993E-01  1.0000E+00  1.0000E+00  1.0000E+00

 ETAshrink(%):   1.3728E+00  5.3898E+00  1.0000E+02  1.0000E+02  2.5927E+01  1.0000E+02  1.0000E+02  1.0000E+02
 EPSshrink(%):   1.0000E+02  7.3228E+00


 #TERE:
 Elapsed estimation time in seconds:    12.65

 ********************               FIRST ORDER CONDITIONAL ESTIMATION WITH INTERACTION              ********************
 #OBJT:**************                       MINIMUM VALUE OF OBJECTIVE FUNCTION                      ********************
 #OBJV:********************************************    28604.626       **************************************************

 ********************               FIRST ORDER CONDITIONAL ESTIMATION WITH INTERACTION              ********************
 ********************                             FINAL PARAMETER ESTIMATE                           ********************

 THETA - VECTOR OF FIXED EFFECTS PARAMETERS   *********
         TH 1      TH 2      TH 3      TH 4      TH 5      TH 6      TH 7      TH 8
         1.72E-01  3.11E+00  7.40E-01  2.22E+00  3.29E-01  6.98E-01  7.50E-01  1.00E+00

 OMEGA - COV MATRIX FOR RANDOM EFFECTS - ETAS  ********
            ETA1      ETA2      ETA3      ETA4      ETA5      ETA6      ETA7      ETA8
 ETA1
+        6.75E-02
 ETA2
+        5.59E-02  1.04E-01
 ETA3
+        0.00E+00  0.00E+00  0.00E+00
 ETA4
+        0.00E+00  0.00E+00  0.00E+00  0.00E+00
 ETA5
+        0.00E+00  0.00E+00  0.00E+00  0.00E+00  2.53E-01
 ETA6
+        0.00E+00  0.00E+00  0.00E+00  0.00E+00  0.00E+00  0.00E+00
 ETA7
+        0.00E+00  0.00E+00  0.00E+00  0.00E+00  0.00E+00  0.00E+00  0.00E+00
 ETA8
+        0.00E+00  0.00E+00  0.00E+00  0.00E+00  0.00E+00  0.00E+00  0.00E+00  0.00E+00

 SIGMA - COV MATRIX FOR RANDOM EFFECTS - EPSILONS  ****
            EPS1      EPS2
 EPS1
+        0.00E+00
 EPS2
+        0.00E+00  2.06E-02

 OMEGA - CORR MATRIX FOR RANDOM EFFECTS - ETAS  *******
            ETA1      ETA2      ETA3      ETA4      ETA5      ETA6      ETA7      ETA8
 ETA1
+        2.60E-01
 ETA2
+        6.67E-01  3.22E-01
 ETA3
+        0.00E+00  0.00E+00  0.00E+00
 ETA4
+        0.00E+00  0.00E+00  0.00E+00  0.00E+00
 ETA5
+        0.00E+00  0.00E+00  0.00E+00  0.00E+00  5.03E-01
 ETA6
+        0.00E+00  0.00E+00  0.00E+00  0.00E+00  0.00E+00  0.00E+00
 ETA7
+        0.00E+00  0.00E+00  0.00E+00  0.00E+00  0.00E+00  0.00E+00  0.00E+00
 ETA8
+        0.00E+00  0.00E+00  0.00E+00  0.00E+00  0.00E+00  0.00E+00  0.00E+00  0.00E+00

 SIGMA - CORR MATRIX FOR RANDOM EFFECTS - EPSILONS  ***
            EPS1      EPS2
 EPS1
+        0.00E+00
 EPS2
+        0.00E+00  1.44E-01
 #TBLN:      2
 #METH: Importance Sampling
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
 #TERM:
 OPTIMIZATION COMPLETED

 ETABAR IS THE ARITHMETIC MEAN OF THE ETA-ESTIMATES,
 AND THE P-VALUE IS GIVEN FOR THE NULL HYPOTHESIS THAT THE TRUE MEAN IS 0.

 ETABAR:        -8.1252E-03 -1.1391E-02  0.0000E+00  0.0000E+00  5.7411E-04  0.0000E+00  0.0000E+00  0.0000E+00
 SE:             2.4339E-02  2.9098E-02  0.0000E+00  0.0000E+00  3.5558E-02  0.0000E+00  0.0000E+00  0.0000E+00

 P VAL.:         7.3851E-01  6.9545E-01  1.0000E+00  1.0000E+00  9.8712E-01  1.0000E+00  1.0000E+00  1.0000E+00

 ETAshrink(%):   1.9115E+00  5.7932E+00  0.0000E+00  0.0000E+00  2.6240E+01  0.0000E+00  0.0000E+00  0.0000E+00
 EPSshrink(%):   1.0000E+02  7.7243E+00


 #TERE:
 Elapsed estimation time in seconds:     8.00

 Number of Negative Eigenvalues in Matrix=           1
 Most negative value=  -280.922883104008
 Most positive value=   139661.291778009
 Forcing positive definiteness
 Root mean square deviation of matrix from original=   3.073169041873822E-003

 Elapsed covariance time in seconds:     5.13

 ********************                               IMPORTANCE SAMPLING                              ********************
 #OBJT:**************                        FINAL VALUE OF OBJECTIVE FUNCTION                       ********************
 #OBJV:********************************************    28600.308       **************************************************

 ********************                               IMPORTANCE SAMPLING                              ********************
 ********************                             FINAL PARAMETER ESTIMATE                           ********************

 THETA - VECTOR OF FIXED EFFECTS PARAMETERS   *********
         TH 1      TH 2      TH 3      TH 4      TH 5      TH 6      TH 7      TH 8
         1.73E-01  3.13E+00  7.24E-01  2.23E+00  3.29E-01  6.98E-01  7.50E-01  1.00E+00

 OMEGA - COV MATRIX FOR RANDOM EFFECTS - ETAS  ********
            ETA1      ETA2      ETA3      ETA4      ETA5      ETA6      ETA7      ETA8
 ETA1
+        6.84E-02
 ETA2
+        5.64E-02  1.06E-01
 ETA3
+        0.00E+00  0.00E+00  0.00E+00
 ETA4
+        0.00E+00  0.00E+00  0.00E+00  0.00E+00
 ETA5
+        0.00E+00  0.00E+00  0.00E+00  0.00E+00  2.58E-01
 ETA6
+        0.00E+00  0.00E+00  0.00E+00  0.00E+00  0.00E+00  0.00E+00
 ETA7
+        0.00E+00  0.00E+00  0.00E+00  0.00E+00  0.00E+00  0.00E+00  0.00E+00
 ETA8
+        0.00E+00  0.00E+00  0.00E+00  0.00E+00  0.00E+00  0.00E+00  0.00E+00  0.00E+00

 SIGMA - COV MATRIX FOR RANDOM EFFECTS - EPSILONS  ****
            EPS1      EPS2
 EPS1
+        0.00E+00
 EPS2
+        0.00E+00  2.05E-02

 OMEGA - CORR MATRIX FOR RANDOM EFFECTS - ETAS  *******
            ETA1      ETA2      ETA3      ETA4      ETA5      ETA6      ETA7      ETA8
 ETA1
+        2.61E-01
 ETA2
+        6.63E-01  3.25E-01
 ETA3
+        0.00E+00  0.00E+00  0.00E+00
 ETA4
+        0.00E+00  0.00E+00  0.00E+00  0.00E+00
 ETA5
+        0.00E+00  0.00E+00  0.00E+00  0.00E+00  5.08E-01
 ETA6
+        0.00E+00  0.00E+00  0.00E+00  0.00E+00  0.00E+00  0.00E+00
 ETA7
+        0.00E+00  0.00E+00  0.00E+00  0.00E+00  0.00E+00  0.00E+00  0.00E+00
 ETA8
+        0.00E+00  0.00E+00  0.00E+00  0.00E+00  0.00E+00  0.00E+00  0.00E+00  0.00E+00

 SIGMA - CORR MATRIX FOR RANDOM EFFECTS - EPSILONS  ***
            EPS1      EPS2
 EPS1
+        0.00E+00
 EPS2
+        0.00E+00  1.43E-01

 ********************                               IMPORTANCE SAMPLING                              ********************
 ********************                         STANDARD ERROR OF ESTIMATE (RSR)                       ********************

 THETA - VECTOR OF FIXED EFFECTS PARAMETERS   *********
         TH 1      TH 2      TH 3      TH 4      TH 5      TH 6      TH 7      TH 8
         9.84E-03  7.15E-02  8.86E-02  2.06E-01  6.01E-02  2.29E-01  0.00E+00  0.00E+00

 OMEGA - COV MATRIX FOR RANDOM EFFECTS - ETAS  ********
            ETA1      ETA2      ETA3      ETA4      ETA5      ETA6      ETA7      ETA8
 ETA1
+        1.03E-02
 ETA2
+        1.95E-02  6.78E-02
 ETA3
+        0.00E+00  0.00E+00  0.00E+00
 ETA4
+        0.00E+00  0.00E+00  0.00E+00  0.00E+00
 ETA5
+        0.00E+00  0.00E+00  0.00E+00  0.00E+00  7.28E-02
 ETA6
+        0.00E+00  0.00E+00  0.00E+00  0.00E+00  0.00E+00  0.00E+00
 ETA7
+        0.00E+00  0.00E+00  0.00E+00  0.00E+00  0.00E+00  0.00E+00  0.00E+00
 ETA8
+        0.00E+00  0.00E+00  0.00E+00  0.00E+00  0.00E+00  0.00E+00  0.00E+00  0.00E+00

 SIGMA - COV MATRIX FOR RANDOM EFFECTS - EPSILONS  ****
            EPS1      EPS2
 EPS1
+        0.00E+00
 EPS2
+        0.00E+00  9.75E-03

 OMEGA - CORR MATRIX FOR RANDOM EFFECTS - ETAS  *******
            ETA1      ETA2      ETA3      ETA4      ETA5      ETA6      ETA7      ETA8
 ETA1
+        1.98E-02
 ETA2
+        6.32E-02  1.04E-01
 ETA3
+       ......... ......... .........
 ETA4
+       ......... ......... ......... .........
 ETA5
+       ......... ......... ......... .........  7.17E-02
 ETA6
+       ......... ......... ......... ......... ......... .........
 ETA7
+       ......... ......... ......... ......... ......... ......... .........
 ETA8
+       ......... ......... ......... ......... ......... ......... ......... .........

 SIGMA - CORR MATRIX FOR RANDOM EFFECTS - EPSILONS  ***
            EPS1      EPS2
 EPS1
+       .........
 EPS2
+       .........  3.40E-02
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
 ********************                               IMPORTANCE SAMPLING                              ********************
 ********************                   EIGENVALUES OF COR MATRIX OF ESTIMATE (RSR)                  ********************

             1         2         3         4         5         6         7         8         9        10        11
         4.01E-03  1.10E-02  1.21E-02  5.90E-02  9.44E-02  1.03E-01  3.87E-01  6.72E-01  1.18E+00  1.57E+00  6.90E+00
 #TBLN:      3
 #METH: Objective Function Evaluation by Importance Sampling
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
 #TERM:
 OPTIMIZATION NOT COMPLETED

 ETABAR IS THE ARITHMETIC MEAN OF THE ETA-ESTIMATES,
 AND THE P-VALUE IS GIVEN FOR THE NULL HYPOTHESIS THAT THE TRUE MEAN IS 0.

 ETABAR:        -7.4913E-03 -1.1507E-02  0.0000E+00  0.0000E+00  2.6922E-03  0.0000E+00  0.0000E+00  0.0000E+00
 SE:             2.4351E-02  2.9122E-02  0.0000E+00  0.0000E+00  3.5475E-02  0.0000E+00  0.0000E+00  0.0000E+00

 P VAL.:         7.5836E-01  6.9274E-01  1.0000E+00  1.0000E+00  9.3951E-01  1.0000E+00  1.0000E+00  1.0000E+00

 ETAshrink(%):   1.8656E+00  5.7176E+00  0.0000E+00  0.0000E+00  2.6410E+01  0.0000E+00  0.0000E+00  0.0000E+00
 EPSshrink(%):   1.0000E+02  7.7286E+00


 #TERE:
 Elapsed estimation time in seconds:     9.01
 Elapsed covariance time in seconds:    33.83

 ********************               OBJECTIVE FUNCTION EVALUATION BY IMPORTANCE SAMPLING             ********************
 #OBJT:**************                        FINAL VALUE OF OBJECTIVE FUNCTION                       ********************
 #OBJV:********************************************    28600.379       **************************************************

 ********************               OBJECTIVE FUNCTION EVALUATION BY IMPORTANCE SAMPLING             ********************
 ********************                             FINAL PARAMETER ESTIMATE                           ********************

 THETA - VECTOR OF FIXED EFFECTS PARAMETERS   *********
         TH 1      TH 2      TH 3      TH 4      TH 5      TH 6      TH 7      TH 8
         1.73E-01  3.13E+00  7.24E-01  2.23E+00  3.29E-01  6.98E-01  7.50E-01  1.00E+00

 OMEGA - COV MATRIX FOR RANDOM EFFECTS - ETAS  ********
            ETA1      ETA2      ETA3      ETA4      ETA5      ETA6      ETA7      ETA8
 ETA1
+        6.84E-02
 ETA2
+        5.64E-02  1.06E-01
 ETA3
+        0.00E+00  0.00E+00  0.00E+00
 ETA4
+        0.00E+00  0.00E+00  0.00E+00  0.00E+00
 ETA5
+        0.00E+00  0.00E+00  0.00E+00  0.00E+00  2.58E-01
 ETA6
+        0.00E+00  0.00E+00  0.00E+00  0.00E+00  0.00E+00  0.00E+00
 ETA7
+        0.00E+00  0.00E+00  0.00E+00  0.00E+00  0.00E+00  0.00E+00  0.00E+00
 ETA8
+        0.00E+00  0.00E+00  0.00E+00  0.00E+00  0.00E+00  0.00E+00  0.00E+00  0.00E+00

 SIGMA - COV MATRIX FOR RANDOM EFFECTS - EPSILONS  ****
            EPS1      EPS2
 EPS1
+        0.00E+00
 EPS2
+        0.00E+00  2.05E-02

 OMEGA - CORR MATRIX FOR RANDOM EFFECTS - ETAS  *******
            ETA1      ETA2      ETA3      ETA4      ETA5      ETA6      ETA7      ETA8
 ETA1
+        2.61E-01
 ETA2
+        6.63E-01  3.25E-01
 ETA3
+        0.00E+00  0.00E+00  0.00E+00
 ETA4
+        0.00E+00  0.00E+00  0.00E+00  0.00E+00
 ETA5
+        0.00E+00  0.00E+00  0.00E+00  0.00E+00  5.08E-01
 ETA6
+        0.00E+00  0.00E+00  0.00E+00  0.00E+00  0.00E+00  0.00E+00
 ETA7
+        0.00E+00  0.00E+00  0.00E+00  0.00E+00  0.00E+00  0.00E+00  0.00E+00
 ETA8
+        0.00E+00  0.00E+00  0.00E+00  0.00E+00  0.00E+00  0.00E+00  0.00E+00  0.00E+00

 SIGMA - CORR MATRIX FOR RANDOM EFFECTS - EPSILONS  ***
            EPS1      EPS2
 EPS1
+        0.00E+00
 EPS2
+        0.00E+00  1.43E-01

 ********************               OBJECTIVE FUNCTION EVALUATION BY IMPORTANCE SAMPLING             ********************
 ********************                         STANDARD ERROR OF ESTIMATE (RSR)                       ********************

 THETA - VECTOR OF FIXED EFFECTS PARAMETERS   *********
         TH 1      TH 2      TH 3      TH 4      TH 5      TH 6      TH 7      TH 8
         2.54E-02  8.42E-01  1.07E-01  9.52E-02  7.92E-02  1.54E-01  0.00E+00  0.00E+00

 OMEGA - COV MATRIX FOR RANDOM EFFECTS - ETAS  ********
            ETA1      ETA2      ETA3      ETA4      ETA5      ETA6      ETA7      ETA8
 ETA1
+        1.06E-02
 ETA2
+        1.68E-02  5.97E-02
 ETA3
+        0.00E+00  0.00E+00  0.00E+00
 ETA4
+        0.00E+00  0.00E+00  0.00E+00  0.00E+00
 ETA5
+        0.00E+00  0.00E+00  0.00E+00  0.00E+00  9.74E-02
 ETA6
+        0.00E+00  0.00E+00  0.00E+00  0.00E+00  0.00E+00  0.00E+00
 ETA7
+        0.00E+00  0.00E+00  0.00E+00  0.00E+00  0.00E+00  0.00E+00  0.00E+00
 ETA8
+        0.00E+00  0.00E+00  0.00E+00  0.00E+00  0.00E+00  0.00E+00  0.00E+00  0.00E+00

 SIGMA - COV MATRIX FOR RANDOM EFFECTS - EPSILONS  ****
            EPS1      EPS2
 EPS1
+        0.00E+00
 EPS2
+        0.00E+00  7.30E-03

 OMEGA - CORR MATRIX FOR RANDOM EFFECTS - ETAS  *******
            ETA1      ETA2      ETA3      ETA4      ETA5      ETA6      ETA7      ETA8
 ETA1
+        2.03E-02
 ETA2
+        6.73E-02  9.17E-02
 ETA3
+       ......... ......... .........
 ETA4
+       ......... ......... ......... .........
 ETA5
+       ......... ......... ......... .........  9.59E-02
 ETA6
+       ......... ......... ......... ......... ......... .........
 ETA7
+       ......... ......... ......... ......... ......... ......... .........
 ETA8
+       ......... ......... ......... ......... ......... ......... ......... .........

 SIGMA - CORR MATRIX FOR RANDOM EFFECTS - EPSILONS  ***
            EPS1      EPS2
 EPS1
+       .........
 EPS2
+       .........  2.55E-02
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
 ********************               OBJECTIVE FUNCTION EVALUATION BY IMPORTANCE SAMPLING             ********************
 ********************                   EIGENVALUES OF COR MATRIX OF ESTIMATE (RSR)                  ********************

             1         2         3         4         5         6         7         8         9        10        11
         3.58E-03  5.85E-03  1.54E-02  1.96E-02  5.21E-02  8.72E-02  2.51E-01  3.44E-01  1.06E+00  1.41E+00  7.75E+00
